// SBML level 2 version 4

model rtc2_counter()

  // Compartments:
  compartment Medium = 0.4;
  compartment Ecoli in Medium = 7e-16;

  // Species:
  species arab in Medium = 0; arab is "nb:i0003(arac)";
  species dna1 in Ecoli = 2.373042e-9; dna1 is "d:b0014*()-e0040*()-j01010*(rib~off)-r0085*(rnap)-b0014*()-i2032*(dna)-j01010*(rib~off)-j23100*()";
  species dna2 in Ecoli = 2.373042e-9; dna2 is "d:b0014*()-j01008*()-i0500*(arac1!1,arac2!2).p:c0080(arab,dim!3,dna!1).p:c0080(arab,dim!3,dna!2)";
  species nb_i0003_arac in Ecoli = 0; nb_i0003_arac is "nb:i0003(arac)";
  species r_j01010_rib_off_i2032_dna in Ecoli = 0; r_j01010_rib_off_i2032_dna is "r:j01010(rib~off)-i2032(dna)";
  species s6 in Ecoli = 0; s6 is "p:c0080(arab,dim!1,dna).p:c0080(arab,dim!1,dna)";
  species d_b0014_j01008_i0500_arac1_arac2 in Ecoli = 0; d_b0014_j01008_i0500_arac1_arac2 is "d:b0014*()-j01008*()-i0500*(arac1,arac2)";
  species r_j01008 in Ecoli = 0; r_j01008 is "r:j01008()";
  species s9 in Ecoli = 0; s9 is "nb:i0003(arac!1).p:c0080(arab!1,dim!2,dna).p:c0080(arab,dim!2,dna)";
  species p_c0080_arab_dim_dna in Ecoli = 0; p_c0080_arab_dim_dna is "p:c0080(arab,dim,dna)";
  species r_j01010_rib_on_i2032_dna in Ecoli = 0; r_j01010_rib_on_i2032_dna is "r:j01010(rib~on)-i2032(dna)";
  species s12 in Ecoli = 0; s12 is "nb:i0003(arac!1).nb:i0003(arac!2).p:c0080(arab!1,dim!3,dna).p:c0080(arab!2,dim!3,dna)";
  species s13 in Ecoli = 0; s13 is "nb:i0003(arac!1).p:c0080(arab!1,dim,dna)";
  species p_i2032_dna in Ecoli = 0; p_i2032_dna is "p:i2032(dna)";
  species s15 in Ecoli = 0; s15 is "d:b0014*()-e0040*()-j01010*(rib~off)-r0085*(rnap!1)-b0014*()-i2032*(dna)-j01010*(rib~off)-j23100*().p:i2032(dna!1)";
  species r_j01010_rib_off_e0040 in Ecoli = 0; r_j01010_rib_off_e0040 is "r:j01010(rib~off)-e0040()";
  species r_j01010_rib_on_e0040 in Ecoli = 0; r_j01010_rib_on_e0040 is "r:j01010(rib~on)-e0040()";
  species p_e0040 in Ecoli = 0; p_e0040 is "p:e0040()";

  // Parameters:
  NA = 6.02e23;
  f = 1;
  N = 1;
  pulse_conc = 0.001;
  pulse1_start = 2500.01;
  pulse2_start = 2561.01;
  arab_init = 0;
  transp2_pout = 0.2;
  transp2_pin = 0.2;
  rule12_k = 1.5;
  rule6_k = 0.01;
  rule11_k = 0.0005;
  rule20_k = 0.35;
  rule16_k = 0.0706;
  rule1_k = 100000000;
  rule4_k = 0.1;
  rule5_k = 71000000000;
  rule10_k = 0.1;
  rule14_kcat = 7.6;
  rule14_Km = 0.0009;
  rule17_k = 0.167;
  rule2_k = 10;
  rule3_k = 1000000000;
  rule13_k = 0.1;
  rule7_k = 2000000;
  rule18_k = 0.0056;
  rule8_k = 0.06;
  rule9_k = 0.5;
  rule15_k = 0.07;
  rule19_k = 0.0015;

  // Assignment rules:
  Ve := f*0.4;
  V := f*7e-16;
  dna1_init := 1/NA/V;
  dna2_init := 1/NA/V;
  time_ := time;

  // Reactions:
  r1: => arab; N*transp2_pout*nb_i0003_arac*Medium;  // modifiers: nb_i0003_arac
  r2: arab => ; N*transp2_pin*arab*Medium;
  r3: => nb_i0003_arac; transp2_pin*arab*Ecoli;  // modifiers: arab
  r4: nb_i0003_arac => ; transp2_pout*nb_i0003_arac*Ecoli;
  r5: => r_j01010_rib_off_i2032_dna; rule12_k*dna1*Ecoli;  // modifiers: dna1
  r6: dna2 => s6 + d_b0014_j01008_i0500_arac1_arac2; 2*rule6_k*dna2*Ecoli;
  r7: => r_j01008; rule11_k*dna2*Ecoli;  // modifiers: dna2
  r8: nb_i0003_arac => ; rule20_k*nb_i0003_arac*Ecoli;
  r9: r_j01010_rib_off_i2032_dna => ; rule16_k*r_j01010_rib_off_i2032_dna*Ecoli;
  r10: s6 + nb_i0003_arac => s9; rule1_k*s6*nb_i0003_arac*Ecoli;
  r11: s6 + nb_i0003_arac => s9; rule1_k*s6*nb_i0003_arac*Ecoli;
  r12: s6 => p_c0080_arab_dim_dna + p_c0080_arab_dim_dna; rule4_k*s6*Ecoli;
  r13: s6 + d_b0014_j01008_i0500_arac1_arac2 => dna2; rule5_k*s6*d_b0014_j01008_i0500_arac1_arac2*Ecoli;
  r14: => r_j01008; rule10_k*d_b0014_j01008_i0500_arac1_arac2*Ecoli;  // modifiers: d_b0014_j01008_i0500_arac1_arac2
  r15: r_j01010_rib_off_i2032_dna => r_j01010_rib_on_i2032_dna; rule14_kcat*r_j01008*r_j01010_rib_off_i2032_dna/(rule14_Km + r_j01010_rib_off_i2032_dna)*Ecoli;  // modifiers: r_j01008
  r16: r_j01008 => ; rule17_k*r_j01008*Ecoli;
  r17: s9 + nb_i0003_arac => s12; rule1_k*s9*nb_i0003_arac*Ecoli;
  r18: s9 => nb_i0003_arac + s6; rule2_k*s9*Ecoli;
  r19: s9 => p_c0080_arab_dim_dna + s13; rule4_k*s9*Ecoli;
  r20: s9 => s6; rule20_k*s9*Ecoli;
  r21: p_c0080_arab_dim_dna + nb_i0003_arac => s13; rule1_k*p_c0080_arab_dim_dna*nb_i0003_arac*Ecoli;
  r22: p_c0080_arab_dim_dna + p_c0080_arab_dim_dna => s6; 0.5*rule3_k*p_c0080_arab_dim_dna*p_c0080_arab_dim_dna*Ecoli;
  r23: => p_i2032_dna; rule13_k*r_j01010_rib_on_i2032_dna*Ecoli;  // modifiers: r_j01010_rib_on_i2032_dna
  r24: r_j01010_rib_on_i2032_dna => ; rule16_k*r_j01010_rib_on_i2032_dna*Ecoli;
  r25: s12 => nb_i0003_arac + s9; 2*rule2_k*s12*Ecoli;
  r26: s12 => s13 + s13; rule4_k*s12*Ecoli;
  r27: s12 => s9; 2*rule20_k*s12*Ecoli;
  r28: s13 => p_c0080_arab_dim_dna + nb_i0003_arac; rule2_k*s13*Ecoli;
  r29: p_c0080_arab_dim_dna + s13 => s9; rule3_k*p_c0080_arab_dim_dna*s13*Ecoli;
  r30: s13 + s13 => s12; 0.5*rule3_k*s13*s13*Ecoli;
  r31: s13 => p_c0080_arab_dim_dna; rule20_k*s13*Ecoli;
  r32: p_i2032_dna + dna1 => s15; rule7_k*p_i2032_dna*dna1*Ecoli;
  r33: p_i2032_dna => ; rule18_k*p_i2032_dna*Ecoli;
  r34: s15 => dna1 + p_i2032_dna; rule8_k*s15*Ecoli;
  r35: => r_j01010_rib_off_e0040; rule9_k*s15*Ecoli;  // modifiers: s15
  r36: => r_j01010_rib_off_i2032_dna; rule12_k*s15*Ecoli;  // modifiers: s15
  r37: s15 => dna1; rule18_k*s15*Ecoli;
  r38: r_j01010_rib_off_e0040 => r_j01010_rib_on_e0040; rule14_kcat*r_j01008*r_j01010_rib_off_e0040/(rule14_Km + r_j01010_rib_off_e0040)*Ecoli;  // modifiers: r_j01008
  r39: r_j01010_rib_off_e0040 => ; rule15_k*r_j01010_rib_off_e0040*Ecoli;
  r40: => p_e0040; rule13_k*r_j01010_rib_on_e0040*Ecoli;  // modifiers: r_j01010_rib_on_e0040
  r41: r_j01010_rib_on_e0040 => ; rule15_k*r_j01010_rib_on_e0040*Ecoli;
  r42: p_e0040 => ; rule19_k*p_e0040*Ecoli;

  // Events:
  pulse1: at (time_ > pulse1_start): arab = pulse_conc;
  pulse2: at (time_ > pulse2_start): arab = pulse_conc;
end
